// SBML level 2 version 4
// dcterms:bibliographicCitation: http://identifiers.org/pubmed/11972055

function Function_for_Reaction5(A, DA, deterministicOscillator, gammaA)
  A*DA*deterministicOscillator*gammaA;
end

function Function_for_Reaction11(A, DR, deterministicOscillator, gammaR)
  A*DR*deterministicOscillator*gammaR;
end

function Function_for_Reaction1(A, R, deterministicOscillator, gammaC)
  A*R*deterministicOscillator*gammaC;
end

model vilarOscillator()
  // Vilar2002_Oscillator
  // Minimal Model for Circadian Oscillations
  // Citation
  // Vilar JMG, Kueh HY, Barkai N, Leibler S, (2002) . Mechanisms of noise resistance in genetic oscillators, PNAS, 99(9):5988-5992. http://www.pnas.org/cgi/content/abstract/ 99/9/5988
  // Description
  // A minimal model of genomically based oscillation, based on two mutually interacting genes, an activator and a repressor. Postive feedback is provided by the activator protein, which binds to the promotors of both the activator and the repressor genes. Negative feedback is provided by the repressor protein which binds to the activator protein.
  // Rate constant Reaction
  // alphaA = 50 DA -> DA + MA
  // alphaAp = 500 DAp -> DAp + MA
  // alphaR = 0.01 DR -> DR + MR
  // alphaRp = 50 DRp -> DRp + MR
  // betaA = 50 MA -> A + MA
  // betaR = 5 MR -> MR + R
  // gammaA = 1 A + DA -> DAp
  // gammaC = 2 A + R -> C
  // gammaR = 1 A + DR -> DRp
  // deltaA = 1 A -> EmptySet
  // deltaA = 1 C -> R
  // deltaMA = 10 MA -> EmptySet
  // deltaMR = 0.5 MR -> EmptySet
  // deltaR = 0.2 R -> EmptySet
  // thetaA = 50 DAp -> A + DA
  // thetaR = 100 DRp -> A + DR
  // Variable IC ODE
  // A 0 A'[t] == -(deltaA*A[t]) - gammaA*A[t]*DA[t] + thetaA*DAp[ t] - gammaR*A[t]*DR[t] + thetaR*DRp[t] + betaA*MA[t] - gammaC*A[t]*R[t]
  // C 0 C'[t] == -(deltaA*C[t]) + gammaC*A[t]*R[t]
  // DA 1 DA'[t] == -(gammaA*A[t]*DA[t]) + thetaA*DAp[t]
  // DAp 0 DAp'[t] == gammaA*A[t]*DA[t] - thetaA*DAp[t]
  // DR 1 DR'[t] == -(gammaR*A[t]*DR[t]) + thetaR*DRp[t]
  // DRp 0 DRp'[t] == gammaR*A[t]*DR[t] - thetaR*DRp[t]
  // MA 0 MA'[t] == alphaA*DA[t] + alphaAp*DAp[t] - deltaMA*MA[t]
  // MR 0 MR'[t] == alphaR*DR[t] + alphaRp*DRp[t] - deltaMR*MR[t]
  // R 0 R'[t] == deltaA*C[t] + betaR*MR[t] - deltaR*R[t] - gammaC*A[t]*R[t]
  // Generated by Cellerator Version 1.0 update 2.1127 using Mathematica 4.2 for Mac OS X (June 4, 2002), November 27, 2002 12:17:46, using (PowerMac,PowerPC, Mac OS X,MacOSX,Darwin)
  // author=B.E.Shapiro
  // This model originates from BioModels Database: A Database of Annotated Published Models. It is copyright (c) 2005-2009 The BioModels Team.
  // For more information see the terms of use .
  // To cite BioModels Database, please use Le Novère N., Bornstein B., Broicher A., Courtot M., Donizelli M., Dharuri H., Li L., Sauro H., Schilstra M., Shapiro B., Snoep J.L., Hucka M. (2006) BioModels Database: A Free, Centralized Database of Curated, Published, Quantitative Kinetic Models of Biochemical and Cellular Systems Nucleic Acids Res., 34: D689-D691.
  // biomodels.db:BIOMD0000000035
  // biomodels.db:MODEL6619651140
  // isVersionOf GO:0042752
  // hasTaxon taxonomy:131567
  // isDescribedBy pubmed:11972055
  // hasTaxon taxonomy:131567

  // Compartments:
  compartment deterministicOscillator = 1;

  // Species:
  species $EmptySet in deterministicOscillator = 0;
  species A in deterministicOscillator = 0;  // isVersionOf CHEBI:36080
  species C in deterministicOscillator = 0;  // isVersionOf CHEBI:36080
  species DA in deterministicOscillator = 1/deterministicOscillator;
  species DAp in deterministicOscillator = 0;
  species DR in deterministicOscillator = 1/deterministicOscillator;
  species DRp in deterministicOscillator = 0;
  species MA in deterministicOscillator = 0;  // isVersionOf CHEBI:33699
  species MR in deterministicOscillator = 0;  // isVersionOf CHEBI:33699
  species R in deterministicOscillator = 0;  // isVersionOf CHEBI:36080

  // Reactions:
  Reaction1: A + R => C; deterministicOscillator*Function_for_Reaction1(A, R, deterministicOscillator, gammaC);  // isVersionOf GO:0006461
    gammaC = 2;
  Reaction2: A => $EmptySet; deterministicOscillator*Reaction2_k1*A;  // isVersionOf GO:0030163
    Reaction2_k1 = 1;
  Reaction3: C => R; deterministicOscillator*Reaction3_k1*C;  // isVersionOf GO:0030163
    Reaction3_k1 = 1;
  Reaction4: R => $EmptySet; deterministicOscillator*Reaction4_k1*R;  // isVersionOf GO:0030163
    Reaction4_k1 = 0.2;
  Reaction5: A + DA => DAp; deterministicOscillator*Function_for_Reaction5(A, DA, deterministicOscillator, gammaA);  // isVersionOf GO:0016563
    gammaA = 1;
  Reaction6: DAp => A + DA; deterministicOscillator*Reaction6_k1*DAp;  // isVersionOf GO:0032986
    Reaction6_k1 = 50;
  Reaction7: DA => DA + MA; deterministicOscillator*Reaction7_k1*DA;  // isVersionOf GO:0006351
    Reaction7_k1 = 50;
  Reaction8: DAp => DAp + MA; deterministicOscillator*Reaction8_k1*DAp;  // isVersionOf GO:0006351
    Reaction8_k1 = 500;
  Reaction9: MA => $EmptySet; deterministicOscillator*Reaction9_k1*MA;  // isVersionOf GO:0006402
    Reaction9_k1 = 10;
  Reaction10: MA => A + MA; deterministicOscillator*Reaction10_k1*MA;  // isVersionOf GO:0006412
    Reaction10_k1 = 50;
  Reaction11: A + DR => DRp; deterministicOscillator*Function_for_Reaction11(A, DR, deterministicOscillator, gammaR);  // isVersionOf GO:0010843; isVersionOf GO:0016563
    gammaR = 1;
  Reaction12: DRp => A + DR; deterministicOscillator*Reaction12_k1*DRp;  // isVersionOf GO:0032986
    Reaction12_k1 = 100;
  Reaction13: DR => DR + MR; deterministicOscillator*Reaction13_k1*DR;  // isVersionOf GO:0006351
    Reaction13_k1 = 0.01;
  Reaction14: DRp => DRp + MR; deterministicOscillator*Reaction14_k1*DRp;  // isVersionOf GO:0006351
    Reaction14_k1 = 50;
  Reaction15: MR => $EmptySet; deterministicOscillator*Reaction15_k1*MR;  // isVersionOf GO:0006402
    Reaction15_k1 = 0.5;
  Reaction16: MR => MR + R; deterministicOscillator*Reaction16_k1*MR;  // isVersionOf GO:0006412
    Reaction16_k1 = 5;

  // Unit definitions:
  unit time = 3600 second; time is "hour";
end
